<?xml version="1.0"?>
<?xml-stylesheet type="text/xsl" href="http://jsbsim.sourceforge.net/JSBSim.xsl"?>

<fdm_config name="dc3" version="2.0" release="ALPHA"
   xmlns:xsi="http://www.w3.org/2001/XMLSchema-instance"
   xsi:noNamespaceSchemaLocation="http://jsbsim.sourceforge.net/JSBSim.xsd">

    <fileheader>
        <author>Tobias Dammers</author>
        <filecreationdate>12 Mar 2023</filecreationdate>
        <version>0.1</version>
        <description>Douglas DC-3</description>
    </fileheader>

    <!--
      Sources:
        https://pcmuseum.tripod.com/dc3/index.html
    -->

    <!--
      File:     dc3.xml
      Inputs:
        name:          dc3
        type:          Multi-engine Propeller Airliner, Propeller Transport
        stall speed:   66.95kts
        max weight:    26204.48 lb
        length:        64.42 ft
        wing:
         span:         95.00 ft
         area:         987.05 sq-ft
         mean chord:   30.26 ft
         aspect ratio: 9.15:1
         taper ratio:  3.30:1
         incidence:    2.00 degrees
         dihedral:     5.00 degrees
         sweep:        8.00 degrees

        no. engines:   2
        engine type:   Piston Engine
        engine layout: wings

        control type:   Conventional Controls

        gear type:     taildragger
        steering type: castering
        retractable?:  yes

      Outputs:
        wing loading:       26.55 lb/sq-ft
         - thickness ratio: 42.42%
        payload:            34.29 lbs
        CL-alpha:           14.87 per radian
        CL-0:               0.33
        CL-max:             1.75
        CD-0:               0.07
        K:                  0.04
        Mcrit:              0.70

        min. turn radius    219.12 ft
        max. turn rate:     0.57 deg/s
-->

    <!--

      Key Metrics:
        Wing Root LE:      174.1667"       (measured from blueprint)
        MAC:               138.1000"       (manual)
        MAC LE:            206.0667"       (manual: 31.9" aft of Wing Root LE)
        MAC TE:            344.1667"       (calculated)
        MAC% limits:       11% - 28%       (manual)
        MAC fwd limit:     221.2577"       (calculated)
        MAC rear limit:    244.7347"       (calculated)
        Empty CG:          242.76" - 253.5 (manual)

    -->
    <metrics>
        <wingarea  unit="FT2">   987.05 </wingarea>
        <wingspan  unit="FT" >    95.00 </wingspan>
        <wing_incidence unit="DEG"> 2.00 </wing_incidence>
        <chord     unit="FT" >    30.26 </chord>
        <htailarea unit="FT2">   179.20 </htailarea>
        <htailarm  unit="FT" >    27.89 </htailarm>
        <vtailarea  unit="FT2">   84.60 </vtailarea>
        <vtailarm  unit="FT" >    27.56 </vtailarm>
        <location name="AERORP" unit="IN">
            <!-- 33% MAC -->
            <x>   251.64 </x>
            <y>     0.00 </y>
            <z>     0.00 </z>
        </location>
        <location name="EYEPOINT" unit="IN">
            <x>    61.84 </x>
            <y>   -24.00 </y>
            <z>    65.00 </z>
        </location>
        <location name="VRP" unit="M">
            <x>  9.84</x>
            <y>  0.00</y>
            <z>  0.35</z>
        </location>
    </metrics>

    <mass_balance>
        <ixx unit="SLUG*FT2">129620</ixx>
        <iyy unit="SLUG*FT2"> 73810</iyy>
        <izz unit="SLUG*FT2">236356</izz>
        <emptywt unit="LBS" >18190</emptywt>
        <location name="CG" unit="IN">
            <x>   243.34 </x>
            <y>     0.00 </y>
            <z>   -19.33 </z>
        </location>

        <pointmass name="Flight Crew (A)">
            <description>Flight Crew (A)</description>
            <location name="POINTMASS" unit="IN">
                <x>  61.84 </x>
                <y> -21.00 </y>
                <z>   0.00 </z>
            </location>
            <weight unit="LBS">360</weight>
        </pointmass>

        <pointmass name="Baggage Front (B)">
            <description>Baggage Front (B)</description>
            <weight unit="LBS">200</weight>
            <location name="POINTMASS" unit="IN">
                <x> 130.00 </x>
                <y> 0.00 </y>
                <z> 0.00 </z>
            </location>
        </pointmass>

        <pointmass name="Front Galley / Navigator (C)">
            <description>Front Galley / Navigator (C)</description>
            <weight unit="LBS">100</weight>
            <location name="POINTMASS" unit="IN">
                <x> 90.00 </x>
                <y> 0.00 </y>
                <z> 0.00 </z>
            </location>
        </pointmass>


        <pointmass name="Passengers / Cargo D">
            <description>Passengers / Cargo D</description>
            <weight unit="LBS">0</weight>
            <location name="POINTMASS" unit="IN">
                <x> 125.00 </x>
                <y> 0.00 </y>
                <z> 0.00 </z>
            </location>
        </pointmass>

        <pointmass name="Passengers / Cargo E">
            <description>Passengers / Cargo E</description>
            <weight unit="LBS">0</weight>
            <location name="POINTMASS" unit="IN">
                <x> 320.00 </x>
                <y> 0.00 </y>
                <z> 0.00 </z>
            </location>
        </pointmass>

        <pointmass name="Passengers / Cargo F">
            <description>Passengers / Cargo F</description>
            <weight unit="LBS">0</weight>
            <location name="POINTMASS" unit="IN">
                <x> 415 </x>
                <y> 0.00 </y>
                <z> 0.00 </z>
            </location>
        </pointmass>

        <pointmass name="Baggage Rear (G)">
            <description>Baggage Rear (G)</description>
            <weight unit="LBS">0</weight>
            <location name="POINTMASS" unit="IN">
                <x> 510.00 </x>
                <y> 0.00 </y>
                <z> 0.00 </z>
            </location>
        </pointmass>

        <pointmass name="Rear Galley / Lavatory">
            <description>Rear Galley / Lavatory</description>
            <weight unit="LBS">150</weight>
            <location name="POINTMASS" unit="IN">
                <x>560.00</x>
                <y> 0.00 </y>
                <z> 0.00 </z>
            </location>
        </pointmass>
    </mass_balance>

    <propulsion>
        <engine file="Electric1200hp">
            <feed>0</feed>

            <thruster file="Hamilton_Standard_23E50">
                <sense> 1 </sense>
                <location unit="IN">
                    <x>   107.67 </x>
                    <y>  -111.00 </y>
                    <z>   -25.00 </z>
                </location>
                <orient unit="DEG">
                    <pitch>     0.00 </pitch>
                    <roll>     0.00 </roll>
                    <yaw>     0.00 </yaw>
                </orient>
            </thruster>
        </engine>

        <engine file="Electric1200hp">
            <feed>1</feed>

            <thruster file="Hamilton_Standard_23E50">
                <sense> 1 </sense>
                <location unit="IN">
                    <x>   107.67 </x>
                    <y>   111.00 </y>
                    <z>   -25.00 </z>
                </location>
                <orient unit="DEG">
                    <pitch>     0.00 </pitch>
                    <roll>     0.00 </roll>
                    <yaw>     0.00 </yaw>
                </orient>
            </thruster>
        </engine>

        <!--
            Manual lists tanks as 168 imp. gal. for the front tanks, 167 imp.
            gal. for the rear tanks; fuel density is given as 7.2 lbs/imp.gal.,
            which amounts to 1209 lbs and 1202 lbs respectively.
        -->
        <tank type="FUEL" number="0">
            <!-- Left forward -->
            <location unit="IN">
                <x>   243.34 </x>
                <y>  -285.00 </y>
                <z>   -19.33 </z>
            </location>
            <capacity unit="LBS">1209</capacity>
            <contents unit="LBS">1000</contents>
            <density>6.02</density>
            <type>AVGAS</type>
            <priority>0</priority>
        </tank>
        <tank type="FUEL" number="1">
            <!-- Right forward -->
            <location unit="IN">
                <x>   243.34 </x>
                <y>   285.00 </y>
                <z>   -19.33 </z>
            </location>
            <capacity unit="LBS">1209</capacity>
            <contents unit="LBS">1000</contents>
            <density>6.02</density>
            <type>AVGAS</type>
            <priority>0</priority>
        </tank>
        <tank type="FUEL" number="2">
            <!-- Left rear -->
            <location unit="IN">
                <x>   243.34 </x>
                <y>  -285.00 </y>
                <z>   -19.33 </z>
            </location>
            <capacity unit="LBS">1202</capacity>
            <contents unit="LBS">1000</contents>
            <density>6.02</density>
            <type>AVGAS</type>
            <priority>0</priority>
        </tank>
        <tank type="FUEL" number="3">
            <!-- Right rear -->
            <location unit="IN">
                <x>   243.34 </x>
                <y>   285.00 </y>
                <z>   -19.33 </z>
            </location>
            <capacity unit="LBS">1202</capacity>
            <contents unit="LBS">1000</contents>
            <density>6.02</density>
            <type>AVGAS</type>
            <priority>0</priority>
        </tank>

    </propulsion>

    <ground_reactions>

        <contact type="BOGEY" name="LEFT_MAIN">
            <location unit="IN">
                <x> 215.33 </x>
                <y>-111.00</y>
                <z>-130.33</z>
            </location>
            <static_friction>  1.00 </static_friction>
            <dynamic_friction> 0.50 </dynamic_friction>
            <rolling_friction> 0.02 </rolling_friction>
            <spring_coeff  unit="LBS/FT">     45000 </spring_coeff>
            <damping_coeff unit="LBS/FT/SEC"> 9000 </damping_coeff>
            <max_steer unit="DEG">0</max_steer>
            <brake_group> LEFT </brake_group>
            <retractable> 1 </retractable>
        </contact>

        <contact type="BOGEY" name="RIGHT_MAIN">
            <location unit="IN">
                <x> 215.33</x>
                <y> 111.00</y>
                <z>-130.33</z>
            </location>
            <static_friction>  1.00 </static_friction>
            <dynamic_friction> 0.50 </dynamic_friction>
            <rolling_friction> 0.02 </rolling_friction>
            <spring_coeff  unit="LBS/FT">     45000 </spring_coeff>
            <damping_coeff unit="LBS/FT/SEC"> 9000 </damping_coeff>
            <max_steer unit="DEG">0</max_steer>
            <brake_group> RIGHT </brake_group>
            <retractable> 1 </retractable>
        </contact>

        <contact type="BOGEY" name="TAIL">
            <location unit="IN">
                <x> 665.00</x>
                <y>   0.00</y>
                <z> -42.66</z>
            </location>
            <static_friction>  0.80 </static_friction>
            <dynamic_friction> 0.50 </dynamic_friction>
            <rolling_friction> 0.02 </rolling_friction>
            <spring_coeff  unit="LBS/FT">5800</spring_coeff>
            <damping_coeff unit="LBS/FT/SEC">1150</damping_coeff>
            <max_steer unit="DEG">0</max_steer>
            <castered>1</castered>
            <brake_group> NONE </brake_group>
            <retractable> 0 </retractable>
        </contact>

        <contact type="STRUCTURE" name="LEFT_WING">
            <location unit="IN">
                <x>   180.00 </x>
                <y>  -570.00 </y>
                <z>     0.00 </z>
            </location>
            <static_friction>  1 </static_friction>
            <dynamic_friction> 1 </dynamic_friction>
            <spring_coeff unit="LBS/FT">      26204.48 </spring_coeff>
            <damping_coeff unit="LBS/FT/SEC"> 26204.48 </damping_coeff>
        </contact>

        <contact type="STRUCTURE" name="RIGHT_WING">
            <location unit="IN">
                <x>   180.00 </x>
                <y>   570.00 </y>
                <z>     0.00 </z>
            </location>
            <static_friction>  1 </static_friction>
            <dynamic_friction> 1 </dynamic_friction>
            <spring_coeff unit="LBS/FT">      26204.48 </spring_coeff>
            <damping_coeff unit="LBS/FT/SEC"> 26204.48 </damping_coeff>
        </contact>

        <contact type="STRUCTURE" name="STABILIZER_TOP">
            <location unit="IN">
                <x>   722.00 </x>
                <y>     0.00 </y>
                <z>   158.33 </z>
            </location>
            <static_friction>  1 </static_friction>
            <dynamic_friction> 1 </dynamic_friction>
            <spring_coeff unit="LBS/FT">      26204.48 </spring_coeff>
            <damping_coeff unit="LBS/FT/SEC"> 26204.48 </damping_coeff>
        </contact>

        <contact type="STRUCTURE" name="TAIL">
            <location unit="IN">
                <x>   773.00 </x>
                <y>     0.00 </y>
                <z>   158.33 </z>
            </location>
            <static_friction>  1 </static_friction>
            <dynamic_friction> 1 </dynamic_friction>
            <spring_coeff unit="LBS/FT">      26204.48 </spring_coeff>
            <damping_coeff unit="LBS/FT/SEC"> 26204.48 </damping_coeff>
        </contact>

        <contact type="STRUCTURE" name="NOSE">
            <location unit="IN">
                <x>     0.00 </x>
                <y>     0.00 </y>
                <z>     0.00 </z>
            </location>
            <static_friction>  1 </static_friction>
            <dynamic_friction> 1 </dynamic_friction>
            <spring_coeff unit="LBS/FT">      26204.48 </spring_coeff>
            <damping_coeff unit="LBS/FT/SEC"> 26204.48 </damping_coeff>
        </contact>

        <contact type="STRUCTURE" name="COCKPIT_ROOF">
            <location unit="IN">
                <x>    38.00 </x>
                <y>     0.00 </y>
                <z>    38.00 </z>
            </location>
            <static_friction>  1 </static_friction>
            <dynamic_friction> 1 </dynamic_friction>
            <spring_coeff unit="LBS/FT">      26204.48 </spring_coeff>
            <damping_coeff unit="LBS/FT/SEC"> 26204.48 </damping_coeff>
        </contact>

        <contact type="STRUCTURE" name="FRONT_FUSELAGE_ROOF">
            <location unit="IN">
                <x>    63.00 </x>
                <y>     0.00 </y>
                <z>    63.00 </z>
            </location>
            <static_friction>  1 </static_friction>
            <dynamic_friction> 1 </dynamic_friction>
            <spring_coeff unit="LBS/FT">      26204.48 </spring_coeff>
            <damping_coeff unit="LBS/FT/SEC"> 26204.48 </damping_coeff>
        </contact>


    </ground_reactions>

    <system file="Engines.xml"/>
    <system file="Fuel.xml"/>
    <system file="Propulsion.xml"/>
    <system file="Aircraft control.xml"/>
    <system file="Landing Gear.xml"/>
    <system file="Flaps.xml"/>

    <flight_control name="FCS: dc3">

    </flight_control>

    <aerodynamics>

        <axis name="LIFT">

            <function name="aero/force/Lift_propwash">
                <description>Delta lift due to propeller induced velocity</description>
                <product>
                    <property>systems/propulsion/thrust-coefficient</property>
                    <property>aero/qbar-psf</property>
                    <property>metrics/Sw-sqft</property>
                    <property>params/lift/propwash</property>
                    <table>
                        <independentVar lookup="row">aero/alpha-rad</independentVar>
                        <tableData>
                            -0.38  0.000
                            0.00  0.038
                            0.10  0.203
                            0.20  0.000
                        </tableData>
                    </table>
                </product>
            </function>

            <!-- Lift above 0.85 and below -0.85 is generalised -->
            <function name="aero/force/Lift_alpha">
                <description>Lift due to alpha</description>
                <product>
                    <property>aero/qbar-psf</property>
                    <property>metrics/Sw-sqft</property>
                    <property>params/lift/alpha</property>
                    <table>
                        <independentVar lookup="row">aero/alpha-rad</independentVar>
                        <tableData>
                            -1.57    0
                            -1.3    -0.35
                            -1      -0.85
                            -0.9    -1
                            -0.8    -1.15
                            -0.7    -1.2
                            -0.6    -1.1
                            -0.5    -0.75
                            -0.4    -0.6
                            -0.3    -0.65
                            -0.25   -0.75
                            -0.2    -0.8
                            -0.15   -0.75
                            -0.1    -0.5
                             0       0.4
                             0.1     1.4
                             0.15    1.68
                             0.2     1.75
                             0.25    1.65
                             0.35    0.8
                             0.4     0.71
                             0.45    0.8
                             0.6     1.3
                             0.7     1.4
                             0.8     1.35
                             1       1.1
                             1.3     0.55
                             1.57    0
                        </tableData>
                    </table>
                </product>
            </function>

            <function name="aero/force/Lift_pitch_rate">
                <description>Lift due to pitch rate</description>
                <product>
                    <property>aero/qbar-psf</property>
                    <property>metrics/Sw-sqft</property>
                    <property>velocities/q-aero-rad_sec</property>
                    <property>aero/ci2vel</property>
                    <property>params/lift/pitch-rate</property>
                </product>
            </function>

            <function name="aero/force/Lift_alpha_rate">
                <description>Lift due to alpha rate</description>
                <product>
                    <property>aero/qbar-psf</property>
                    <property>metrics/Sw-sqft</property>
                    <property>aero/alphadot-rad_sec</property>
                    <property>aero/ci2vel</property>
                    <property>params/lift/alpha-rate</property>
                </product>
            </function>

            <function name="aero/force/Lift_elevator">
                <description>Lift due to Elevator Deflection</description>
                <product>
                    <property>aero/qbar-psf</property>
                    <property>metrics/Sw-sqft</property>
                    <property>fcs/elevator-pos-rad</property>
                    <property>params/lift/elevator</property>
                </product>
            </function>

            <function name="aero/force/Lift_flap">
                <description>Delta Lift due to flaps</description>
                <product>
                    <property>aero/qbar-psf</property>
                    <property>metrics/Sw-sqft</property>
                    <table>
                        <independentVar lookup="row">fcs/flap-pos-deg</independentVar>
                        <tableData>
                             0 0
                             7 0.3
                            15 0.6
                            20 0.9
                            33 1
                        </tableData>
                    </table>
                    <property>params/lift/flaps</property>
                </product>
            </function>

            <!--
            <function name="aero/force/Lift_backfiring_left">
                <description>Lift due to left engine backfiring</description>
                <product>
                    <property>propulsion/engine[0]/backfiring-event</property>
                    <property>-params/lift/backfiring</property>
                </product>
            </function>

            <function name="aero/force/Lift_backfiring_right">
                <description>Lift due to right engine backfiring</description>
                <product>
                    <property>propulsion/engine[1]/backfiring-event</property>
                    <property>params/lift/backfiring</property>
                </product>
            </function>
            -->

        </axis>

        <axis name="DRAG">

            <!-- CD0 is based on fuselage, wing, horizontal- en vertical tail -->
            <!-- Antennas, struts and wires are not taken into account        -->
            <!-- CD for gear (fixed and retractable) is defined below         -->
            <function name="aero/force/Drag_minimum">
                <description>Minimum drag</description>
                <product>
                    <property>aero/qbar-psf</property>
                    <property>metrics/Sw-sqft</property>
                    <property>params/drag/parasitic</property>
                </product>
            </function>

            <function name="aero/force/Drag_alpha">
                <description>Drag due to alpha</description>
                <product>
                    <property>aero/qbar-psf</property>
                    <property>metrics/Sw-sqft</property>
                    <property>params/drag/alpha</property>

                    <table>
                        <independentVar lookup="row">aero/alpha-rad</independentVar>
                        <tableData>
                            -1.57   5
                            -0.9    2
                            -0.65   1
                            -0.4    0.3
                            -0.2    0.03
                            0       0
                            0.2     0.03
                            0.4     0.3
                            0.65    1
                            0.9     2
                            1.57    5
                        </tableData>
                    </table>
                </product>
            </function>

            <function name="aero/force/Drag_induced">
                <description>Induced drag</description>
                <product>
                    <property>aero/qbar-psf</property>
                    <property>metrics/Sw-sqft</property>
                    <property>aero/cl-squared</property>
                    <property>params/drag/induced</property>
                </product>
            </function>

            <function name="aero/force/Drag_mach">
                <description>Drag due to mach</description>
                <product>
                    <property>aero/qbar-psf</property>
                    <property>metrics/Sw-sqft</property>
                    <property>params/drag/mach</property>
                    <table>
                        <independentVar lookup="row">velocities/mach</independentVar>
                        <tableData>
                            0.00    0.0000
                            0.70    0.0000
                            1.10    0.0230
                            1.80    0.0150
                        </tableData>
                    </table>
                </product>
            </function>

            <function name="aero/force/Drag_beta">
                <description>Drag due to sideslip</description>
                <product>
                    <property>aero/qbar-psf</property>
                    <property>metrics/Sw-sqft</property>
                    <property>params/drag/beta</property>
                    <table>
                        <independentVar lookup="row">aero/beta-rad</independentVar>
                        <tableData>
                            -1.57    1.2300
                            -0.26    0.0500
                            0.00    0.0000
                            0.26    0.0500
                            1.57    1.2300
                        </tableData>
                    </table>
                </product>
            </function>

            <function name="aero/force/Drag_elevator">
                <description>Drag due to Elevator Deflection</description>
                <product>
                    <property>aero/qbar-psf</property>
                    <property>metrics/Sw-sqft</property>
                    <abs>
                        <property>fcs/elevator-pos-rad</property>
                    </abs>
                    <property>params/drag/elevator</property>
                </product>
            </function>

            <function name="aero/force/Drag_gear">
                <description>Drag due to gear</description>
                <product>
                    <property>aero/qbar-psf</property>
                    <property>metrics/Sw-sqft</property>
                    <property>gear/gear-pos-norm</property>
                    <property>params/drag/gear</property>
                </product>
            </function>

            <function name="aero/force/Drag_cowl_flap_left">
                <description>Drag due to left cowl flaps</description>
                <product>
                    <property>aero/qbar-psf</property>
                    <property>metrics/Sw-sqft</property>
                    <property>/controls/engines/engine[0]/cowl-flaps-pos</property>
                    <property>params/drag/cowl-flaps</property>
                </product>
            </function>

            <function name="aero/force/Drag_cowl_flap_right">
                <description>Drag due to left cowl flaps</description>
                <product>
                    <property>aero/qbar-psf</property>
                    <property>metrics/Sw-sqft</property>
                    <property>/controls/engines/engine[1]/cowl-flaps-pos</property>
                    <property>params/drag/cowl-flaps</property>
                </product>
            </function>


            <function name="aero/force/Drag_flap">
                <description>Drag due to flaps</description>
                <product>
                    <property>aero/qbar-psf</property>
                    <property>metrics/Sw-sqft</property>
                    <property>params/drag/flaps</property>
                    <table>
                        <independentVar lookup="row">fcs/flap-pos-deg</independentVar>
                        <tableData>
                             0 0
                             7 0.2
                            15 0.4
                            20 0.75
                            33 1
                        </tableData>
                    </table>
                </product>
            </function>


        </axis>

        <axis name="SIDE">

            <function name="aero/force/Side_beta">
                <description>Side force due to beta</description>
                <product>
                    <property>aero/qbar-psf</property>
                    <property>metrics/Sw-sqft</property>
                    <property>aero/beta-rad</property>
                    <value> -0.1 </value>
                </product>
            </function>
            <function name="aero/force/Side_roll_rate">
                <description>Side force due to roll rate</description>
                <product>
                    <property>aero/qbar-psf</property>
                    <property>metrics/Sw-sqft</property>
                    <property>aero/bi2vel</property>
                    <property>velocities/p-aero-rad_sec</property>
                    <table>
                        <independentVar lookup="row">aero/Re</independentVar>
                        <tableData>
                            21794298   0.3264
                            23973730   0.0243
                            32691448   0.0108
                            43509952   0.0061
                        </tableData>
                    </table>
                </product>
            </function>

            <function name="aero/force/Side_yaw_rate">
                <description>Side force due to yaw rate</description>
                <product>
                    <property>aero/qbar-psf</property>
                    <property>metrics/Sw-sqft</property>
                    <property>aero/bi2vel</property>
                    <property>velocities/r-aero-rad_sec</property>
                    <value> 0.2335 </value>
                </product>
            </function>

            <function name="aero/force/Side_rudder">
                <description>Side force due to rudder</description>
                <product>
                    <property>aero/qbar-psf</property>
                    <property>metrics/Sw-sqft</property>
                    <property>fcs/rudder-pos-rad</property>
                    <value> 0.1206 </value>
                </product>
            </function>

        </axis>

        <axis name="PITCH">

            <function name="aero/moment/Pitch_propwash">
                <description>Pitch moment due to propeller induced velocity</description>
                <product>
                    <property>systems/propulsion/thrust-coefficient</property>
                    <property>aero/qbar-psf</property>
                    <property>metrics/Sw-sqft</property>
                    <property>metrics/bw-ft</property>
                    <table>
                        <independentVar lookup="row">aero/alpha-rad</independentVar>
                        <independentVar lookup="column">fcs/flap-pos-deg</independentVar>
                        <tableData>
                            0.0     60.0
                            -0.01  0.000   0.000
                            0.00 -0.006  -0.017
                            0.10 -0.034  -0.091
                            0.13  0.000   0.000
                        </tableData>
                    </table>
                    <property>params/pitch/propwash</property>
                </product>
            </function>

            <function name="aero/moment/Pitch_alpha">
                <description>Pitch moment due to alpha</description>
                <product>
                    <property>aero/qbar-psf</property>
                    <property>metrics/Sw-sqft</property>
                    <property>metrics/cbarw-ft</property>
                    <property>aero/alpha-rad</property>
                    <value>-1</value>
                    <property>params/pitch/alpha</property>
                </product>
            </function>

            <function name="aero/moment/Pitch_elevator">
                <description>Pitch moment due to elevator</description>
                <product>
                    <property>aero/qbar-psf</property>
                    <property>metrics/Sw-sqft</property>
                    <property>metrics/cbarw-ft</property>
                    <property>fcs/elevator-pos-rad</property>
                    <table>
                        <independentVar lookup="row">velocities/mach</independentVar>
                        <tableData>
                            0.0    1.0
                            0.6    1.0
                            0.8    0.9
                            1.0    0.8
                            2.0    0.5
                        </tableData>
                    </table>
                    <property>params/pitch/elevator</property>
                </product>
            </function>

            <function name="aero/moment/Pitch_damp">
                <description>Pitch moment due to pitch rate</description>
                <product>
                    <property>aero/qbar-psf</property>
                    <property>metrics/Sw-sqft</property>
                    <property>metrics/cbarw-ft</property>
                    <property>aero/ci2vel</property>
                    <property>velocities/q-aero-rad_sec</property>
                    <value>-1</value>
                    <property>params/pitch/rate</property>
                </product>
            </function>

            <function name="aero/moment/Pitch_alphadot">
                <description>Pitch moment due to alpha rate</description>
                <product>
                    <property>aero/qbar-psf</property>
                    <property>metrics/Sw-sqft</property>
                    <property>metrics/cbarw-ft</property>
                    <property>aero/ci2vel</property>
                    <property>aero/alphadot-rad_sec</property>
                    <value>-1</value>
                    <property>params/pitch/alphadot</property>
                </product>
            </function>

        </axis>

        <axis name="ROLL">

            <function name="aero/moment/Roll_differential_propwash">
                <description>Roll moment due to differential propwash</description>
                <product>
                    <property>systems/propulsion/thrust-coefficient-left-right</property>
                    <property>aero/qbar-psf</property>
                    <property>metrics/Sw-sqft</property>
                    <property>metrics/bw-ft</property>
                    <property>aero/alpha-rad</property>
                    <value> -4.4423 </value>
                </product>
            </function>

            <!--
            <function name="aero/moment/Roll_backfiring_left">
                <description>Roll moment due to left engine backfiring</description>
                <product>
                    <property>propulsion/engine[0]/backfiring-event</property>
                    <property>params/roll/backfiring</property>
                </product>
            </function>

            <function name="aero/moment/Roll_backfiring_right">
                <description>Roll moment due to right engine backfiring</description>
                <product>
                    <property>propulsion/engine[1]/backfiring-event</property>
                    <property>params/roll/backfiring</property>
                </product>
            </function>
            -->

            <function name="aero/moment/Roll_beta">
                <description>Roll moment due to beta</description>
                <product>
                    <property>aero/qbar-psf</property>
                    <property>metrics/Sw-sqft</property>
                    <property>metrics/bw-ft</property>
                    <property>aero/beta-rad</property>
                    <property>fcs/gear-no-wow</property>
                    <table>
                        <independentVar lookup="row">aero/alpha-rad</independentVar>
                        <independentVar lookup="column">aero/Re</independentVar>
                        <tableData>
                            21794298 23973730 32691448 43509952
                            -0.0349  -0.4202  -0.3714  -0.3690  -0.3678
                            0.3491  -1.1739  -0.6163  -0.6216  -0.6345
                        </tableData>
                    </table>
                    <property>params/roll/beta</property>
                </product>
            </function>

            <function name="aero/moment/Roll_damp">
                <description>Roll moment due to roll rate</description>
                <product>
                    <property>aero/qbar-psf</property>
                    <property>metrics/Sw-sqft</property>
                    <property>metrics/bw-ft</property>
                    <property>aero/bi2vel</property>
                    <property>velocities/p-aero-rad_sec</property>
                    <property>params/roll/damp</property>
                </product>
            </function>

            <function name="aero/moment/Roll_yaw">
                <description>Roll moment due to yaw rate</description>
                <product>
                    <property>aero/qbar-psf</property>
                    <property>metrics/Sw-sqft</property>
                    <property>metrics/bw-ft</property>
                    <property>aero/bi2vel</property>
                    <property>velocities/r-aero-rad_sec</property>
                    <table>
                        <independentVar lookup="row">aero/alpha-rad</independentVar>
                        <independentVar lookup="column">aero/Re</independentVar>
                        <tableData>
                            21794298 23973730 32691448 43509952
                            -0.0349  -0.0504  -0.0504  -0.0504  -0.0504
                            0.3491   4.3706   1.3769   1.3769   1.3769
                        </tableData>
                    </table>
                    <property>params/roll/yaw</property>
                </product>
            </function>

            <function name="aero/moment/Roll_aileron">
                <description>Roll moment due to aileron</description>
                <product>
                    <property>aero/qbar-psf</property>
                    <property>metrics/Sw-sqft</property>
                    <property>metrics/bw-ft</property>
                    <property>fcs/left-aileron-pos-rad</property>
                    <table>
                        <independentVar lookup="row">velocities/mach</independentVar>
                        <tableData>
                            0.0    1.0
                            0.6    1.0
                            0.8    0.9
                            1.0    0.8
                            2.0    0.5
                        </tableData>
                    </table>
                    <property>params/roll/aileron</property>
                </product>
            </function>

            <function name="aero/moment/Roll_rudder">
                <description>Roll moment due to rudder</description>
                <product>
                    <property>aero/qbar-psf</property>
                    <property>metrics/Sw-sqft</property>
                    <property>metrics/bw-ft</property>
                    <property>fcs/rudder-pos-rad</property>
                    <property>params/roll/rudder</property>
                </product>
            </function>

        </axis>

        <axis name="YAW">

            <!-- Stall initiator -->
            <function name="aero/moment/Yaw_alpha">
                <description>Yaw moment due to alpha</description>
                <product>
                    <property>aero/qbar-psf</property>
                    <property>metrics/Sw-sqft</property>
                    <property>metrics/bw-ft</property>
                    <property>aero/alpha-rad</property>
                    <property>fcs/gear-no-wow</property>
                    <table>
                        <independentVar lookup="row">aero/beta-rad</independentVar>
                        <independentVar lookup="column">aero/Re</independentVar>
                        <tableData>
                            21794298 23973730
                            -0.3491  -1.0000   0.0000
                            0.3491   1.0000   0.0000
                        </tableData>
                    </table>
                </product>
            </function>

            <function name="aero/moment/Yaw_beta">
                <description>Yaw moment due to beta</description>
                <product>
                    <property>aero/qbar-psf</property>
                    <property>metrics/Sh-sqft</property>
                    <property>metrics/bw-ft</property>
                    <property>aero/beta-rad</property>
                    <property>params/yaw/beta</property>
                </product>
            </function>

            <function name="aero/moment/Yaw_roll_rate">
                <description>Yaw moment due to roll rate</description>
                <product>
                    <property>aero/qbar-psf</property>
                    <property>metrics/Sw-sqft</property>
                    <property>metrics/bw-ft</property>
                    <property>aero/bi2vel</property>
                    <property>velocities/p-rad_sec</property>
                    <table>
                        <independentVar lookup="row">aero/Re</independentVar>
                        <tableData>
                            21794298  -0.0947
                            23973730  -0.0071
                            32691448  -0.0031
                            43509952  -0.0018
                        </tableData>
                    </table>
                    <property>params/yaw/roll</property>
                </product>
            </function>

            <function name="aero/moment/Yaw_damp">
                <description>Yaw moment due to yaw rate</description>
                <product>
                    <property>aero/qbar-psf</property>
                    <property>metrics/Sw-sqft</property>
                    <property>metrics/bw-ft</property>
                    <property>aero/bi2vel</property>
                    <property>velocities/r-aero-rad_sec</property>
                    <value>-1</value>
                    <property>params/yaw/damp</property>
                </product>
            </function>

            <function name="aero/moment/Yaw_rudder">
                <description>Yaw moment due to rudder</description>
                <product>
                    <property>aero/qbar-psf</property>
                    <property>metrics/Sh-sqft</property>
                    <property>metrics/bw-ft</property>
                    <property>fcs/rudder-pos-rad</property>
                    <table>
                        <independentVar lookup="row">aero/alpha-deg</independentVar>
                        <tableData>
                            -90 0.0
                            -30 0.5
                            -15 1.0
                            0 1.0
                            15 1.0
                            20 0.1
                            30 0.3
                            90 0.0
                        </tableData>
                    </table>
                    <value>-1</value>
                    <property>params/yaw/rudder</property>
                </product>
            </function>

            <function name="aero/moment/Yaw_aileron">
                <description>Adverse yaw</description>
                <product>
                    <property>aero/qbar-psf</property>
                    <property>metrics/Sw-sqft</property>
                    <property>metrics/bw-ft</property>
                    <property>fcs/left-aileron-pos-rad</property>
                    <value>-1</value>
                    <property>params/yaw/aileron</property>
                </product>
            </function>

            <function name="aero/moment/Yaw_cowl_flap_left">
                <description>Drag due to left cowl flaps</description>
                <product>
                    <property>aero/qbar-psf</property>
                    <property>metrics/Sw-sqft</property>
                    <property>/controls/engines/engine[0]/cowl-flaps-pos</property>
                    <property>params/yaw/cowl-flaps</property>
                    <value>-1</value>
                </product>
            </function>

            <function name="aero/moment/Yaw_cowl_flap_right">
                <description>Drag due to left cowl flaps</description>
                <product>
                    <property>aero/qbar-psf</property>
                    <property>metrics/Sw-sqft</property>
                    <property>/controls/engines/engine[1]/cowl-flaps-pos</property>
                    <property>params/yaw/cowl-flaps</property>
                </product>
            </function>


        </axis>

    </aerodynamics>

    <external_reactions>
    </external_reactions>

</fdm_config>
